// COMSOL Multiphysics 5.1.0.145 model "FEA.mph"
// Plate-with-hole
// Outline of the model tree

Parameters
  EM.ai = 3.75[mm]
  EM.ao = 6[mm]
  EM.l = 4[mm]
  as = 140[mm]
  EM.x = -10[mm]
  EM.y = 0[mm]
  EM.z = 4[mm]
  Plate.side_length = 72[mm]
  Plate.height = 2[mm]
  Plate.hole_diameter = 12[mm]
  EM.current_ss = 1[A]
  EM.Nturns = 60
  EM.current_density_ss = EM.current_ss*EM.Nturns / ((EM.ao-EM.ai)*EM.l)
  EM.tau = 3e-4[s]
  Sensor.x = -20[mm]
  Sensor.y = 0[mm]
  Sensor.z = 1.5[mm]
  t_end = 1.5e-3[s]

Functions
  an1: Analytic | funcname = current_density; expr = EM.current_density_ss * (1 - exp(-x/EM.tau)); args = x; argunit = s; fununit = A/m^2

Coordinate systems
  sys2: Cylindrical "Cylindrical System 2" | origin = {EM.x, EM.y, 0}
  ie1: InfiniteElement "Infinite Element Domain 1" on domains 1-13, 15-18, 21-29

Geometry
  geom1 "Geometry 1" (3D, length unit m)
    blk1: Block
      pos = {0, 0, 0}
      base = center
      size = {as, as, as/3}
      layer = 10[mm]
      layerleft = on
      layerright = on
      layerfront = on
      layerback = on
      layertop = on
    cyl1: Cylinder | pos = {EM.x, EM.y, EM.z - EM.l/2}; r = EM.ao; h = EM.l
    cyl2: Cylinder | pos = {EM.x, EM.y, EM.z - EM.l/2}; r = EM.ai; h = EM.l
    dif1: Difference | input = cyl1; input2 = cyl2
    blk4: Block
      pos = {0, 0, -Plate.height/2}
      base = center
      size = {Plate.side_length, Plate.side_length, Plate.height}
    cyl3: Cylinder | pos = {0, 0, -Plate.height}; r = Plate.hole_diameter / 2; h = Plate.height
    dif2: Difference | input = blk4; input2 = cyl3
    fin: Finalize "Form Union"

Materials
  mat1: Common "Air" on all domains
    def "Basic"
      relpermeability = 1
      relpermittivity = 1
      dynamicviscosity = eta(T[1/K])[Pa*s]
      ratioofspecificheat = 1.4
      electricconductivity = 0.2[S/m]
      heatcapacity = Cp(T[1/K])[J/(kg*K)]
      density = rho(pA[1/Pa],T[1/K])[kg/m^3]
      thermalconductivity = k(T[1/K])[W/(m*K)]
      soundspeed = cs(T[1/K])[m/s]
      eta: Piecewise | arg = T; extrap = constant; pieces = {200.0, 1600.0, -8.38278E-7+8.35717342E-8*T^1-7.69429583E-11*T^2+4.6437266E-14*T^3-1.06585607E-17*T^4}
      Cp: Piecewise | arg = T; extrap = constant; pieces = {200.0, 1600.0, 1047.63657-0.372589265*T^1+9.45304214E-4*T^2-6.02409443E-7*T^3+1.2858961E-10*T^4}
      rho: Analytic | expr = pA*0.02897/8.314/T; args = {pA, T}; dermethod = manual; argders = {{pA, d(pA*0.02897/8.314/T,pA)}, {T, d(pA*0.02897/8.314/T,T)}}
      k: Piecewise | arg = T; extrap = constant; pieces = {200.0, 1600.0, -0.00227583562+1.15480022E-4*T^1-7.90252856E-8*T^2+4.11702505E-11*T^3-7.43864331E-15*T^4}
      cs: Analytic | expr = sqrt(1.4*287*T); args = T; dermethod = manual; argders = {T, d(sqrt(1.4*287*T),T)}
  sw1: Switch on domains 19
    mat3: Common "Titanium beta-21S"
      def "Basic"
        relpermeability = 1
        electricconductivity = 7.407e5[S/m]
        thermalexpansioncoefficient = 7.06e-6[1/K]
        heatcapacity = 710[J/(kg*K)]
        relpermittivity = 1
        density = 4940[kg/m^3]
        thermalconductivity = 7.5[W/(m*K)]
      Enu "Young's modulus and Poisson's ratio"
        youngsmodulus = 105e9[Pa]
        poissonsratio = 0.33
    mat2: Common "Air"
      def "Basic"
        relpermeability = 1
        relpermittivity = 1
        dynamicviscosity = eta(T[1/K])[Pa*s]
        ratioofspecificheat = 1.4
        electricconductivity = 0[S/m]
        heatcapacity = Cp(T[1/K])[J/(kg*K)]
        density = rho(pA[1/Pa],T[1/K])[kg/m^3]
        thermalconductivity = k(T[1/K])[W/(m*K)]
        soundspeed = cs(T[1/K])[m/s]
        eta: Piecewise | arg = T; extrap = constant; pieces = {200.0, 1600.0, -8.38278E-7+8.35717342E-8*T^1-7.69429583E-11*T^2+4.6437266E-14*T^3-1.06585607E-17*T^4}
        Cp: Piecewise | arg = T; extrap = constant; pieces = {200.0, 1600.0, 1047.63657-0.372589265*T^1+9.45304214E-4*T^2-6.02409443E-7*T^3+1.2858961E-10*T^4}
        rho: Analytic | expr = pA*0.02897/8.314/T; args = {pA, T}; dermethod = manual; argders = {{pA, d(pA*0.02897/8.314/T,pA)}, {T, d(pA*0.02897/8.314/T,T)}}
        k: Piecewise | arg = T; extrap = constant; pieces = {200.0, 1600.0, -0.00227583562+1.15480022E-4*T^1-7.90252856E-8*T^2+4.11702505E-11*T^3-7.43864331E-15*T^4}
        cs: Analytic | expr = sqrt(1.4*287*T); args = T; dermethod = manual; argders = {T, d(sqrt(1.4*287*T),T)}
      RefractiveIndex
        n = 1
        ki = 0

Physics
  mf: InductionCurrents "Magnetic Fields" on all domains
    dependent variable A = {Ax, Ay, Az}
    al1: AmperesLaw "Ampère's Law 1" (default)
    mi1: MagneticInsulation (default)
    init1: init "Initial Values 1" (default)
    ecd1: ExternalCurrentDensity on domains 20 | Je = {0, current_density(t), 0}; coordinateSystem = sys2

Mesh
  mesh1 "Mesh 1" (physics-controlled)
    size: MeshSizeDefault | hauto = 4

Studies
  std2 "Study 1"
    matsw: MaterialSweep | pname = matsw.mod1.sw1; plistarr = range(1,1,2); pcase = all
    time: Transient "Time Dependent" | tlist = range(0,(t_end-0)/499,t_end)

Exports
  data1: Data
    data = none
    expr = {t, mf.Bx, mf.By, mf.Bz}
    filename = FEA_data/B_Ti.csv
    location = grid
    gridx3 = Sensor.x
    gridy3 = Sensor.y
    gridz3 = Sensor.z