// COMSOL Multiphysics 6.0.0.318 model "FEA_voltage_excit.mph"
// Plate-with-hole
// Outline of the model tree

Parameters
  EM.ai = 3.75[mm]  // inner radius
  EM.ao = 6[mm]  // outer radius
  EM.l = 4[mm]  // length
  EM.x = -10[mm]  // z of center
  EM.y = 0[mm]  // y of center
  EM.z = 4[mm]  // z of center
  EM.N = 60  // number of turns
  EM.dw = 0.35[mm]  // wire diameter
  EM.voltage = 1[V]  // voltage
  EM.pw = 3e-3[s]  // pulse width
  Plate.l = 72[mm]  // side length of plate
  Plate.h = 2[mm]  // height of plate
  Plate.d = 12[mm]  // hole diameter of plate
  Sensor.x = -10[mm]  // sensor x coordinates lower
  Sensor.y = 0[mm]  // sensor y coordinates
  Sensor.z = 1.5[mm]  // sensor z coordinates
  bl = 100[mm]  // boundary length
  t_end = 6e-3[s]

Functions
  rect1: Rectangle | lower = EM.pw * 0.001; upper = EM.pw * 1.001; smooth = EM.pw/500
  an1: Analytic | funcname = voltage; expr = EM.voltage * rect1(t); args = t; fununit = V; argunit = s

Geometry
  geom1 "Geometry 1" (3D, length unit m)
    cyl1: Cylinder
      pos = {EM.x, EM.y, EM.z - EM.l/2}
      axistype = cartesian
      layername = Layer 1
      layer = EM.ao - EM.ai
      r = EM.ao
      h = EM.l
    del1: Delete "Delete Entities 1" | input = cyl1(1) domains 3
    blk4: Block | pos = {0, 0, -Plate.h/2}; base = center; size = {Plate.l, Plate.l, Plate.h}
    cyl3: Cylinder | pos = {0, 0, -Plate.h}; r = Plate.d / 2; h = Plate.h
    dif2: Difference | input = blk4; input2 = cyl3
    blk1: Block
      pos = {0, 0, EM.z}
      axistype = cartesian
      base = center
      size = {bl, bl, bl/3}
      layerleft = on
      layerright = on
      layerfront = on
      layerback = on
      layertop = on
    pt1: Point | p = {Sensor.x, Sensor.y, Sensor.z}
    fin: Finalize "Form Union"

Materials
  mat1: Common "Air" on all domains
    def "Basic"
      relpermeability = 1
      relpermittivity = 1
      dynamicviscosity = eta(T[1/K])[Pa*s]
      ratioofspecificheat = 1.4
      electricconductivity = 2[S/m]
      heatcapacity = Cp(T[1/K])[J/(kg*K)]
      density = rho(pA[1/Pa],T[1/K])[kg/m^3]
      thermalconductivity = k(T[1/K])[W/(m*K)]
      soundspeed = cs(T[1/K])[m/s]
      eta: Piecewise | arg = T; pieces = {200.0, 1600.0, -8.38278E-7+8.35717342E-8*T^1-7.69429583E-11*T^2+4.6437266E-14*T^3-1.06585607E-17*T^4}
      Cp: Piecewise | arg = T; pieces = {200.0, 1600.0, 1047.63657-0.372589265*T^1+9.45304214E-4*T^2-6.02409443E-7*T^3+1.2858961E-10*T^4}
      rho: Analytic | expr = pA*0.02897/8.314/T; args = {pA, T}; dermethod = manual; argders = {{pA, d(pA*0.02897/8.314/T,pA)}, {T, d(pA*0.02897/8.314/T,T)}}
      k: Piecewise | arg = T; pieces = {200.0, 1600.0, -0.00227583562+1.15480022E-4*T^1-7.90252856E-8*T^2+4.11702505E-11*T^3-7.43864331E-15*T^4}
      cs: Analytic | expr = sqrt(1.4*287*T); args = T; dermethod = manual; argders = {T, d(sqrt(1.4*287*T),T)}
  mat2: Common "Titanium beta-21S" on domains 2
    def "Basic"
      relpermeability = 1
      electricconductivity = 7.407e5[S/m]
      thermalexpansioncoefficient = 7.06e-6[1/K]
      heatcapacity = 710[J/(kg*K)]
      relpermittivity = 1
      density = 4940[kg/m^3]
      thermalconductivity = 7.5[W/(m*K)]

Physics
  mf: InductionCurrents "Magnetic Fields" on all domains
    dependent variable A = {Ax, Ay, Az}
    al1: AmperesLaw "Ampère's Law 1" (default)
    mi1: MagneticInsulation (default)
    init1: init "Initial Values 1" (default)
    mtcd1: Coil "Multi-Turn Coil 1" on domains 3-6
      CoilType = Numeric
      DivergenceFilter = 1
      CoilExcitation = Voltage
      N = EM.N
      AreaFrom = Diameter
      coilWindDiameter = EM.dw
      ICoil = current(t)
      VCoil = voltage(t)
      ccc1: CoilCurrentCalculation "Geometry Analysis 1" (default)
        ct1: CoilTerminal "Input 1" on boundaries 20

Mesh
  mesh1 "Mesh 1" (physics-controlled)
    size: MeshSizeDefault | hauto = 4

Studies
  std1 "Study 1"
    ccc: CoilCurrentCalculation "Coil Geometry Analysis"
    time: Transient "Time Dependent"
      tlist = range(0,(EM.pw*0.1-0)/49,EM.pw*0.1) range(EM.pw*0.1,(EM.pw-(EM.pw*0.1))/49,EM.pw) range(EM.pw,(EM.pw*1.1-(EM.pw))/49,EM.pw*1.1) range(EM.pw*1.1,(t_end-(EM.pw*1.1))/49,t_end)

Solver configurations
  sol1 "Solution 1" (study std1)
    v1: Variables "Dependent Variables 1"
    s1: Stationary "Stationary Solver 1"
      dDef: Direct
      se1: Segregated | segterm = itertol; segiter = 6
        ss1: SegregatedStep | segvar = {mod1_mf_mtcd1_ccc1_s}; linsolver = dDef
        ss2: SegregatedStep | segvar = {mod1_mf_mtcd1_ccc1_p, mod1_mf_mtcd1_ccc1_lm}; linsolver = dDef
    su1: StoreSolution "Solution Store 1"
    v2: Variables "Dependent Variables 2" | initmethod = sol; notsolmethod = sol
    t1: Time "Time-Dependent Solver 1"
      tlist = range(0,(EM.pw*0.1-0)/49,EM.pw*0.1) range(EM.pw*0.1,(EM.pw-(EM.pw*0.1))/49,EM.pw) range(EM.pw,(EM.pw*1.1-(EM.pw))/49,EM.pw*1.1) range(EM.pw*1.1,(t_end-(EM.pw*1.1))/49,t_end)
      tstepsbdf = intermediate
      maxstepbdf = t_end / 200
      maxstepexpressionbdf = t_end / 100
      eventtol = 0.1
      estrat = exclude
      rkmethod = dopri5
      fc1: FullyCoupled | linsolver = i1
      i1: Iterative | linsolver = bicgstab; prefuntype = right
        mg1: Multigrid
  sol2 "Solution Store 1" (study std1)

Datasets
  dset1: Solution | solution = sol1
  dset2: Solution | solution = sol2

Derived values
  pev1: EvalPoint "Point Evaluation 1" on points 17
    data = dset1
    table = tbl1
    expr = {mf.Bx, mf.By, mf.Bz, mf.ICoil_1}
    descr = {"Magnetic flux density, x component", "Magnetic flux density, y component", "Magnetic flux density, z component", Coil current}

Plots
  pg1: PlotGroup3D "Magnetic flux density" | data = dset1
    slc1: Slice | expr = mf.normB; quickplane = zx; quickynumber = 1
  pg2: PlotGroup3D "Current density" on domains 2 | data = dset1
    arwv1: ArrowVolume | expr = {mf.Jx, mf.Jy, mf.Jz}; xnumber = 30; ynumber = 30; znumber = 1